// COMSOL Multiphysics 5.6.0.280 model "FP1.mph"
// Outline of the model tree

Parameters
  D = 5e-18  // diffusion coefficient
  v = 1e-9[m/s]  // speed
  nc = 0  // canmtilever damping coefficient
  MeshSizeZ = 4e-14
  stdev = 2e-12

Selections
  sel1: Explicit on domains 1

Geometry
  geom1 "Geometry 1" (1D, length unit nm)
    i2: Interval | coord = {-0.2, 0.2}
    i3: Interval | coord = {-0.2, 2.5}
    fin: Finalize "Form Union"

Physics
  ale: MovingMesh on domains 1, 2
    EquationForm.form = Transient
    FrameSettings.geometryShapeOrder = 1
    fix1: FixedMesh (default)
    disp1: PrescribedMeshDisplacement (default) | useDx = 0; dx = 1e-6*t
    vel1: PrescribedMeshVelocity on boundaries 1, 2 | useVx = 1; vx = v
    free1: FreeDeformation on domains 1
  g: GeneralFormPDE on all domains
    dependent variable u1
    Units.CustomSourceTermUnit = 1
    gfeq1: GeneralFormPDE (default) | f = 0; Ga = -(D*u1x-u1*(1.3*(v*t-x)+6e-6*v-1*x)/(6e-6+nc)); da = 1
    zflx1: ZeroFluxBoundary "Zero Flux 1" (default)
    init1: init "Initial Values 1" (default) | u1 = exp(-(x)^2/(2*(stdev)^2))*1/(2*3.14*(stdev)^2)^.5
    flux1: FluxBoundary "Flux/Source 1" on boundaries 1 | g = -(D*u1x-u1*(1.3*(v*t-x)+6e-6*v-1*x)/(6e-6+nc)); q = -1
    flux2: FluxBoundary "Flux/Source 2" on boundaries 2 | g = (D*u1x-u1*(1.3*(v*t-x)+6e-6*v-1*x)/(6e-6+nc)); q = -1

Mesh
  mesh1 "Mesh 1"
    size: MeshSizeDefault | hmax = 0.027; hauto = 1
    edg1: Edge on domains 2
    size1: Size on domains 1 | hmax = MeshSizeZ/1e-9; custom = on
    edg2: Edge on domains 1

Studies
  std1 "Study 1"
    batsw: BatchSweep (disabled) | accumtable = new
    time: Transient "Time Dependent" | tlist = range(0,1e-11/v,10e-10/v)

Solver configurations
  sol1 "Solution 1" (study std1)
    v1: Variables "Dependent Variables 1"
      comp1_spatial_disp: Field "Spatial mesh displacement (comp1.spatial.disp)" | scalemethod = manual; scaleval = 4e-14
    t1: Time "Time-Dependent Solver 1" | tlist = range(0,1e-11/v,10e-10/v)
      dDef: Direct
      fc1: FullyCoupled | linsolver = dDef

Datasets
  dset1: Solution | solution = sol1

Exports
  data1: Data
    data = dset1
    expr = {u1, x}
    filename = C:\Users\Zac and Sofya\Desktop\Penn\post-doc\mMB paper\V1e-9nc0Mesh4e-14D5e-18.csv